j := 0 .. 15
n := 0 .. 1023
i := 0 .. 6
F := [3000; 5000; 6000; 8000; 9000; 10000; 12000]
A := [7; 9; 8; 7; 3; 2; 5]
h := [0.00342591553; 0.0198488129; -0.0543602554; 0.0256355684; 0.0693667396; -0.0639440064; -0.163419803; 0.429283935; 0.429283935; -0.163419803; -0.0639440064; 0.0693667396; 0.0256355684; -0.0543602554; 0.0198488129; 0.00342591553]
fd := 2*max(F)
td := 1/fd
t[n] := td*n
X[n] := sum(A[i]*sin(2*π*F[i]*t[n]), i = 0 .. 6)
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z(n, j) := if(j > n, 0, n - j)
Xfil[n] := sum(h[j]*X[z(n, j)], j = 0 .. 15)
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# [component: outputs XfilCpp]
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X[z(n, j)] =  # no stored result
